** written by CivilCvCAD inp file writer for CalculiX,Abaqus meshes
** highest dimension mesh elements only.

** Nodes
*Node, NSET=Nall
1, 286, 25, -247
2, 286, 25, 253
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

** Volume elements
*Element, TYPE=C3D10, ELSET=Evolumes
1281, 32, 67, 33, 180, 1159, 1160, 587, 777, 2218, 778
1282, 23, 171, 57, 24, 752, 2219, 1173, 578, 753, 1141
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
** Define element set Eall
*ELSET, ELSET=Eall
Evolumes


***********************************************************
** Element sets for materials and FEM element type (solid, shell, beam, fluid)
*ELSET,ELSET=MechanicalMaterialSolid
Evolumes

***********************************************************
** constraints fixed node sets
** Fixed
*NSET,NSET=Fixed
1,
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
***********************************************************
** constraints contact surface sets
** Contact
*SURFACE, NAME=DEPContact
1344,S4
1655,S1
1703,S3
1704,S4
1728,S3
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2596,S3
*SURFACE, NAME=INDContact
1283,S2
1286,S1
1289,S1
1290,S3
1292,S1
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2345,S4

** Physical constants for SI(mm) unit system with Kelvins
*PHYSICAL CONSTANTS, ABSOLUTE ZERO=0, STEFAN BOLTZMANN=5.670374419e-11

***********************************************************
** Materials
** see information about units at file end
** CivilCvCAD material name: Steel-Generic
** MechanicalMaterial
*MATERIAL, NAME=MechanicalMaterial
*ELASTIC
200000,0.3

***********************************************************
** Sections
*SOLID SECTION, ELSET=MechanicalMaterialSolid, MATERIAL=MechanicalMaterial

***********************************************************
** Contact Constraints
** Contact
*CONTACT PAIR, INTERACTION=INTContact, TYPE=SURFACE TO SURFACE
DEPContact,INDContact
*SURFACE INTERACTION, NAME=INTContact
*SURFACE BEHAVIOR, PRESSURE-OVERCLOSURE=LINEAR
1000000

***********************************************************
** At least one step is needed to run an CalculiX analysis of CivilCvCAD
*STEP
*STATIC


***********************************************************
** Fixed Constraints
** Fixed
*BOUNDARY
Fixed,1
Fixed,2
Fixed,3


***********************************************************
** constraints pressure element face loads
** Pressure
*DLOAD
** Pressure: face load
1733,P4,100.0
1793,P1,100.0
1981,P4,100.0
2040,P1,100.0
2304,P2,100.0
2380,P3,100.0
2463,P2,100.0
2470,P2,100.0
2547,P1,100.0

***********************************************************
** Outputs --> frd file
*NODE FILE
U
*EL FILE
S, E
** outputs --> dat file
** reaction forces for Constraint fixed
*NODE PRINT, NSET=Fixed, TOTALS=ONLY
RF


***********************************************************
*END STEP

***********************************************************
** CalculiX Input file
**   written by    --> CivilCvCAD 0.21.0
**   written on    --> Tue Mar 28 06:51:00 2023
**   file name     --> constraint_contact_solid_solid.FCStd
**   analysis name --> Analysis
**
**
***********************************************************
**  About units:
**  See ccx manual, ccx does not know about any unit.
**  Golden rule: The user must make sure that the numbers they provide have consistent units.
**  The user is the CivilCvCAD calculix writer module ;-)
**
**  The unit system which is used at Guido Dhondt's company: mm, N, s, K
**  Since Length and Mass are connected by Force, if Length is mm the Mass is in t to get N
**  The following units are used to write to inp file:
**
**  Length: mm (this includes the mesh geometry)
**  Mass: t
**  TimeSpan: s
**  Temperature: K
**
**  This leads to:
**  Force: N
**  Pressure: N/mm^2 == MPa (Young's Modulus has unit Pressure)
**  Density: t/mm^3
**  Gravity: mm/s^2
**  Thermal conductivity: t*mm/K/s^3 == as W/m/K == kW/mm/K
**  Specific Heat: mm^2/s^2/K = J/kg/K == kJ/t/K
**
