** written by CivilCvCAD inp file writer for CalculiX,Abaqus meshes
** highest dimension mesh elements only.

** Nodes
*Node, NSET=Nall
1, 200, 0, 0
2, 200, 10, 0
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

** Volume elements
*Element, TYPE=C3D10, ELSET=Evolumes
975, 1261, 660, 636, 114, 1612, 952, 1611, 1614, 1613, 1615
976, 98, 1259, 635, 659, 1618, 1616, 1617, 1620, 1619, 945
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
** Define element set Eall
*ELSET, ELSET=Eall
Evolumes


***********************************************************
** Element sets for materials and FEM element type (solid, shell, beam, fluid)
*ELSET,ELSET=FemMaterialSolid
Evolumes

***********************************************************
** constraints displacement node sets
** Displacement
*NSET,NSET=Displacement
4,
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
***********************************************************
** constraints transform node sets
** Transform1
*NSET,NSET=CylinTransform1
5,
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** Transform2
*NSET,NSET=CylinTransform2
4,
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
** Physical constants for SI(mm) unit system with Kelvins
*PHYSICAL CONSTANTS, ABSOLUTE ZERO=0, STEFAN BOLTZMANN=5.670374419e-11

***********************************************************
** Materials
** see information about units at file end
** CivilCvCAD material name: CalculiX-Steel
** FemMaterial
*MATERIAL, NAME=FemMaterial
*ELASTIC
210000,0.3
*EXPANSION, ZERO=0
0

***********************************************************
** Sections
*SOLID SECTION, ELSET=FemMaterialSolid, MATERIAL=FemMaterial

***********************************************************
** Transform Constraints
** Transform1
*TRANSFORM, NSET=CylinTransform1, TYPE=C
10,5,10,10,6,10
** Transform2
*TRANSFORM, NSET=CylinTransform2, TYPE=C
190,5,10,190,6,10

***********************************************************
** At least one step is needed to run an CalculiX analysis of CivilCvCAD
*STEP, INC=2000
*STATIC


***********************************************************
** Displacement constraint applied
** Displacement
*BOUNDARY
Displacement,1,1,0


***********************************************************
** constraints pressure element face loads
** Pressure
*DLOAD
** CompoundFilter.Face8
1384,P3,10.0
1394,P2,10.0
1397,P2,10.0
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1984,P4,10.0

***********************************************************
** Outputs --> frd file
*NODE FILE
U
*EL FILE
S, E
** outputs --> dat file
** reaction forces for Constraint displacement constraining translation
*NODE PRINT, NSET=Displacement, TOTALS=ONLY
RF

*OUTPUT, FREQUENCY=1
***********************************************************
*END STEP

***********************************************************
** CalculiX Input file
**   written by    --> CivilCvCAD 0.21.0
**   written on    --> Tue Mar 28 06:46:40 2023
**   file name     --> constraint_transform_beam_hinged.FCStd
**   analysis name --> Analysis
**
**
***********************************************************
**  About units:
**  See ccx manual, ccx does not know about any unit.
**  Golden rule: The user must make sure that the numbers they provide have consistent units.
**  The user is the CivilCvCAD calculix writer module ;-)
**
**  The unit system which is used at Guido Dhondt's company: mm, N, s, K
**  Since Length and Mass are connected by Force, if Length is mm the Mass is in t to get N
**  The following units are used to write to inp file:
**
**  Length: mm (this includes the mesh geometry)
**  Mass: t
**  TimeSpan: s
**  Temperature: K
**
**  This leads to:
**  Force: N
**  Pressure: N/mm^2 == MPa (Young's Modulus has unit Pressure)
**  Density: t/mm^3
**  Gravity: mm/s^2
**  Thermal conductivity: t*mm/K/s^3 == as W/m/K == kW/mm/K
**  Specific Heat: mm^2/s^2/K = J/kg/K == kJ/t/K
**
