** written by CivilCvCAD inp file writer for CalculiX,Abaqus meshes
** highest dimension mesh elements only.

** Nodes
*Node, NSET=Nall
1, 0, 0, 10
2, 0, 0, 20
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

** Volume elements
*Element, TYPE=C3D10, ELSET=Evolumes
1, 177, 73, 173, 348, 350, 349, 196, 352, 351, 353
2, 148, 177, 173, 348, 355, 196, 354, 356, 352, 353
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
** Define element set Eall
*ELSET, ELSET=Eall
Evolumes


***********************************************************
** Element sets for materials and FEM element type (solid, shell, beam, fluid)
*ELSET,ELSET=MechanicalMaterialLowSolid
149,
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*ELSET,ELSET=MechanicalMaterialUppSolid
1,
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
***********************************************************
** constraints fixed node sets
** Fixed
*NSET,NSET=Fixed
9,
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
** Physical constants for SI(mm) unit system with Kelvins
*PHYSICAL CONSTANTS, ABSOLUTE ZERO=0, STEFAN BOLTZMANN=5.670374419e-11

***********************************************************
** Materials
** see information about units at file end
** CivilCvCAD material name: Aluminium-Generic
** MechanicalMaterialLow
*MATERIAL, NAME=MechanicalMaterialLow
*ELASTIC
70000,0.35
*EXPANSION, ZERO=0
0
** CivilCvCAD material name: Steel-Generic
** MechanicalMaterialUpp
*MATERIAL, NAME=MechanicalMaterialUpp
*ELASTIC
200000,0.3
*EXPANSION, ZERO=0
0

***********************************************************
** Sections
*SOLID SECTION, ELSET=MechanicalMaterialLowSolid, MATERIAL=MechanicalMaterialLow
*SOLID SECTION, ELSET=MechanicalMaterialUppSolid, MATERIAL=MechanicalMaterialUpp

***********************************************************
** At least one step is needed to run an CalculiX analysis of CivilCvCAD
*STEP, INC=2000
*STATIC


***********************************************************
** Fixed Constraints
** Fixed
*BOUNDARY
Fixed,1
Fixed,2
Fixed,3


***********************************************************
** constraints pressure element face loads
** Pressure
*DLOAD
** MultiMatCompSolid.Face11
61,P3,1000.0
74,P3,1000.0
75,P3,1000.0
80,P2,1000.0
96,P3,1000.0
99,P3,1000.0
100,P4,1000.0
102,P3,1000.0
117,P3,1000.0
118,P3,1000.0
121,P3,1000.0
124,P4,1000.0
127,P2,1000.0
131,P4,1000.0
132,P4,1000.0
134,P2,1000.0

***********************************************************
** Outputs --> frd file
*NODE FILE
U
*EL FILE
S, E
** outputs --> dat file
** reaction forces for Constraint fixed
*NODE PRINT, NSET=Fixed, TOTALS=ONLY
RF

*OUTPUT, FREQUENCY=1
***********************************************************
*END STEP

***********************************************************
** CalculiX Input file
**   written by    --> CivilCvCAD 0.21.0
**   written on    --> Tue Mar 28 06:48:16 2023
**   file name     --> material_multiple_tensionrod_twoboxes.FCStd
**   analysis name --> Analysis
**
**
***********************************************************
**  About units:
**  See ccx manual, ccx does not know about any unit.
**  Golden rule: The user must make sure that the numbers they provide have consistent units.
**  The user is the CivilCvCAD calculix writer module ;-)
**
**  The unit system which is used at Guido Dhondt's company: mm, N, s, K
**  Since Length and Mass are connected by Force, if Length is mm the Mass is in t to get N
**  The following units are used to write to inp file:
**
**  Length: mm (this includes the mesh geometry)
**  Mass: t
**  TimeSpan: s
**  Temperature: K
**
**  This leads to:
**  Force: N
**  Pressure: N/mm^2 == MPa (Young's Modulus has unit Pressure)
**  Density: t/mm^3
**  Gravity: mm/s^2
**  Thermal conductivity: t*mm/K/s^3 == as W/m/K == kW/mm/K
**  Specific Heat: mm^2/s^2/K = J/kg/K == kJ/t/K
**
