** written by CivilCvCAD inp file writer for CalculiX,Abaqus meshes
** highest dimension mesh elements only.

** Nodes
*Node, NSET=Nall
1, -200, -100, 0
2, -200, -100, 10
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

** Volume elements
*Element, TYPE=C3D10, ELSET=Evolumes
4758, 5661, 5549, 1973, 8906, 7768, 8916, 8917, 8919, 8918, 8920
4759, 5515, 2117, 1827, 8908, 8922, 3556, 8921, 8924, 8923, 8925
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
** Define element set Eall
*ELSET, ELSET=Eall
Evolumes


***********************************************************
** Element sets for materials and FEM element type (solid, shell, beam, fluid)
*ELSET,ELSET=Material_linSolid
Evolumes

***********************************************************
** constraints fixed node sets
** Fixed
*NSET,NSET=Fixed
1,
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
** Physical constants for SI(mm) unit system with Kelvins
*PHYSICAL CONSTANTS, ABSOLUTE ZERO=0, STEFAN BOLTZMANN=5.670374419e-11

***********************************************************
** Materials
** see information about units at file end
** CivilCvCAD material name: CalculiX-Steel
** Material_lin
*MATERIAL, NAME=Material_lin
*ELASTIC
210000,0.3
*EXPANSION, ZERO=0
0
*PLASTIC
240.0, 0.0
270.0, 0.025


***********************************************************
** Sections
*SOLID SECTION, ELSET=Material_linSolid, MATERIAL=Material_lin

***********************************************************
** At least one step is needed to run an CalculiX analysis of CivilCvCAD
*STEP, NLGEOM, INC=2000
*STATIC


***********************************************************
** Fixed Constraints
** Fixed
*BOUNDARY
Fixed,1
Fixed,2
Fixed,3


***********************************************************
** constraints pressure element face loads
** Pressure
*DLOAD
** Hole_Plate.Face2
4796,P3,-130.0
4799,P4,-130.0
4872,P4,-130.0
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11158,P4,-130.0

***********************************************************
** Outputs --> frd file
*NODE FILE
U
*EL FILE
S, E, PEEQ
** outputs --> dat file
** reaction forces for Constraint fixed
*NODE PRINT, NSET=Fixed, TOTALS=ONLY
RF

*OUTPUT, FREQUENCY=1
***********************************************************
*END STEP

***********************************************************
** CalculiX Input file
**   written by    --> CivilCvCAD 0.21.0
**   written on    --> Tue Mar 28 07:12:17 2023
**   file name     --> material_nonlinear.FCStd
**   analysis name --> Analysis
**
**
***********************************************************
**  About units:
**  See ccx manual, ccx does not know about any unit.
**  Golden rule: The user must make sure that the numbers they provide have consistent units.
**  The user is the CivilCvCAD calculix writer module ;-)
**
**  The unit system which is used at Guido Dhondt's company: mm, N, s, K
**  Since Length and Mass are connected by Force, if Length is mm the Mass is in t to get N
**  The following units are used to write to inp file:
**
**  Length: mm (this includes the mesh geometry)
**  Mass: t
**  TimeSpan: s
**  Temperature: K
**
**  This leads to:
**  Force: N
**  Pressure: N/mm^2 == MPa (Young's Modulus has unit Pressure)
**  Density: t/mm^3
**  Gravity: mm/s^2
**  Thermal conductivity: t*mm/K/s^3 == as W/m/K == kW/mm/K
**  Specific Heat: mm^2/s^2/K = J/kg/K == kJ/t/K
**
