** written by CivilCvCAD inp file writer for CalculiX,Abaqus meshes
** highest dimension mesh elements only.

** Nodes
*Node, NSET=Nall
1, 0, 0, 0
2, 0, 0, 1
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

** Volume elements
*Element, TYPE=C3D10, ELSET=Evolumes
1431, 1302, 7, 22, 525, 1313, 24, 1314, 2260, 530, 532
1432, 26, 525, 8, 1053, 533, 531, 28, 1064, 2261, 1065
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
** Define element set Eall
*ELSET, ELSET=Eall
Evolumes


***********************************************************
** Element sets for materials and FEM element type (solid, shell, beam, fluid)
*ELSET,ELSET=MaterialCopperSolid
1431,
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*ELSET,ELSET=MaterialInvarSolid
2181,
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
***********************************************************
** constraints fixed node sets
** Fixed
*NSET,NSET=Fixed
1,
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
***********************************************************
** constraints temperature node sets
** TemperatureHot
*NSET,NSET=TemperatureHot
1,
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** TemperatureNormal
*NSET,NSET=TemperatureNormal
1,
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
***********************************************************
** constraints initial temperature node sets
** InitialTemperature

** Physical constants for SI(mm) unit system with Kelvins
*PHYSICAL CONSTANTS, ABSOLUTE ZERO=0, STEFAN BOLTZMANN=5.670374419e-11

***********************************************************
** Materials
** see information about units at file end
** CivilCvCAD material name: Copper
** MaterialCopper
*MATERIAL, NAME=MaterialCopper
*ELASTIC
119000,0.343
*CONDUCTIVITY
398
*EXPANSION, ZERO=273
1.65E-05
*SPECIFIC HEAT
385000000
** CivilCvCAD material name: Invar
** MaterialInvar
*MATERIAL, NAME=MaterialInvar
*ELASTIC
140000,0.29
*CONDUCTIVITY
13.5
*EXPANSION, ZERO=273
1.25E-06
*SPECIFIC HEAT
515000000

***********************************************************
** Initial temperature constraint
*INITIAL CONDITIONS,TYPE=TEMPERATURE
** InitialTemperature
Nall,273.0

***********************************************************
** Sections
*SOLID SECTION, ELSET=MaterialCopperSolid, MATERIAL=MaterialCopper
*SOLID SECTION, ELSET=MaterialInvarSolid, MATERIAL=MaterialInvar

***********************************************************
** At least one step is needed to run an CalculiX analysis of CivilCvCAD
*STEP, INC=2000
*COUPLED TEMPERATURE-DISPLACEMENT, STEADY STATE, SOLVER=SPOOLES
1.0,1.0,1e-05,1.0

***********************************************************
** Fixed Constraints
** Fixed
*BOUNDARY
Fixed,1
Fixed,2
Fixed,3


***********************************************************
** Fixed temperature constraint applied
** TemperatureHot
*BOUNDARY
TemperatureHot,11,11,373.0

** TemperatureNormal
*BOUNDARY
TemperatureNormal,11,11,273.0


***********************************************************
** Outputs --> frd file
*NODE FILE
U, NT
*EL FILE
S, E, HFL
** outputs --> dat file
** reaction forces for Constraint fixed
*NODE PRINT, NSET=Fixed, TOTALS=ONLY
RF

*OUTPUT, FREQUENCY=1
***********************************************************
*END STEP

***********************************************************
** CalculiX Input file
**   written by    --> CivilCvCAD 0.20.1
**   written on    --> Wed Aug 10 04:21:49 2022
**   file name     --> thermomech_bimetal.FCStd
**   analysis name --> Analysis
**
**
***********************************************************
**  About units:
**  See ccx manual, ccx does not know about any unit.
**  Golden rule: The user must make sure that the numbers they provide have consistent units.
**  The user is the CivilCvCAD calculix writer module ;-)
**
**  The unit system which is used at Guido Dhondt's company: mm, N, s, K
**  Since Length and Mass are connected by Force, if Length is mm the Mass is in t to get N
**  The following units are used to write to inp file:
**
**  Length: mm (this includes the mesh geometry)
**  Mass: t
**  TimeSpan: s
**  Temperature: K
**
**  This leads to:
**  Force: N
**  Pressure: N/mm^2 == MPa (Young's Modulus has unit Pressure)
**  Density: t/mm^3
**  Gravity: mm/s^2
**  Thermal conductivity: t*mm/K/s^3 == as W/m/K == kW/mm/K
**  Specific Heat: mm^2/s^2/K = J/kg/K == kJ/t/K
**
